<?xml version="1.0" encoding="UTF-8"?>
<?xml-stylesheet type="text/xsl" href="http://jsbsim.sourceforge.net/JSBSimScript.xsl"?>
<runscript xmlns:xsi="http://www.w3.org/2001/XMLSchema-instance"
    xsi:noNamespaceSchemaLocation="http://jsbsim.sf.net/JSBSimScript.xsd"
    name="C172 cruise at 4K, 100% power">
  <description>This run is for testing the C172 altitude hold autopilot and cruise performance</description>
  <use aircraft="f16gtri" initialize="reset-flying"/>

  <run start="0.0" end="100000" dt="0.0083333">

    <event name="Set Altitude: 40000">
      <condition>
        simulation/sim-time-sec  ge  0.0
      </condition>
      <set name="ap/altitude_setpoint" value="4000.0"/>
    </event>

    <event name="starter">
      <notify/>
      <condition>
        simulation/sim-time-sec >= 0.25
      </condition>
      <set name="propulsion/starter_cmd" value="1"/>
      <set name="fcs/throttle-cmd-norm[0]" value="0.5" action="FG_RAMP" tc ="2"/>
      <set name="gear/gear-cmd-norm" value="0"/>
    </event>
    <event>
      <notify/>
      <condition>
        propulsion/engine[0]/n2 >= 15
      </condition>
      <set name="propulsion/cutoff_cmd" value="0"/>
      <set name="fcs/throttle-cmd-norm[0]" value="0.5" action="FG_RAMP" tc ="2"/>
    </event>


<!--
    <event name="Trim">
      <condition>
        simulation/sim-time-sec  gt  5.0
      </condition>
      <notify>
        <property>propulsion/engine[0]/thrust-lbs</property>
      </notify>
      <set name="simulation/do_simple_trim" value="1"/>
    </event>
  -->

   <event name="1 - Hold bank and altitude">
      <condition>simulation/sim-time-sec ge 5</condition>
      <set name="ap/bank_setpoint" value="0.0"/>
      <set name="ap/bank_hold" value="1"/>
      <set name="ap/altitude_setpoint" value="4000.0"/>
      <set name="ap/altitude_hold" value="1"/>
      <notify/>
    </event>

    <event name="2 - Bank right 0.1 rad">
      <condition>simulation/sim-time-sec ge 10</condition>
      <set name="ap/bank_setpoint" value="0.1"/>
      <notify/>
    </event>

    <event name="3 - Bank left 0.1 rad">
      <condition>simulation/sim-time-sec ge 20</condition>
      <set name="ap/bank_setpoint" value="-0.1"/>
      <notify/>
    </event>

    <event name="4 - Bank left 0.5 rad">
      <condition>simulation/sim-time-sec ge 30</condition>
      <set name="ap/bank_setpoint" value="-0.5"/>
      <notify/>
    </event>

    <event name="5 - Bank right 0.5 rad">
      <condition>simulation/sim-time-sec ge 40</condition>
      <set name="ap/bank_setpoint" value="0.5"/>
      <notify/>
    </event>

    <event name="6 - Hold bank and altitude">
      <condition>simulation/sim-time-sec ge 50</condition>
      <set name="ap/bank_setpoint" value="0.0"/>
      <set name="ap/bank_hold" value="1"/>
      <notify/>
    </event>

  </run>
</runscript>
